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/BATCH
/COM,ANSYS RELEASE 2025 R2           BUILD 25.2      UP20250519       18:26:22
/input,menust,tmp,''
/GST,ON
/PLO,INFO,3
/GRO,CURL,ON
/CPLANE,1
/inp, 'C:/Users/UPM/AppData/Local/Temp/WB_UPM_6520_2/wbnew_files/dp0/APDL/ANSYS/workbench_main.inp'
WPSTYLE,,,,,,,,0
/POST1
SET,LIST
EPLOT
EPLOT
NPLOT
EPLOT
SET,LAST
SET,LIST
!
FINISH
/AUX2
FILE,'file','full','..\..\SYS\MECH\'
HBMAT,'K','sti',' ',ASCII,STIFF,YES
FINISH
!
FINISH
/AUX2
FILE,'file','full','..\..\SYS\MECH\'
HBMAT,'M','mas',' ',ASCII,MASS,YES
FINISH
!
FINISH
/AUX2
FILE,'file','full','..\..\SYS\MECH\'
HBMAT,'C','dam',' ',ASCII,DAMP,YES
FINISH
!
/POST1
SET,LIST
FINISH
! /EXIT,NOSAV
/BATCH
/COM,ANSYS RELEASE 2025 R2           BUILD 25.2      UP20250519       13:14:07
/BATCH
/COM,ANSYS RELEASE 2025 R2           BUILD 25.2      UP20250519       13:15:09
/input,menust,tmp,''
/GST,ON
/PLO,INFO,3
/GRO,CURL,ON
!
/CPLANE,1
/inp, '//tsclient/data/liangye/study loves me/data/non-linear problem/Periodic Forced Response Solver/two-solid system/FEM/FromAnsys/block case_files/dp0/APDL/ANSYS/workbench_main.inp'
WPSTYLE,,,,,,,,0
/SOLU
FINISH
/POST1
SET,LIST
!
FINISH
/AUX2
FILE,'file0','full','..\..\SYS\MECH\'
HBMAT,'K_lumpm_file0','sti',' ',ASCII,STIFF,YES
FINISH
!
FINISH
/AUX2
FILE,'file1','full','..\..\SYS\MECH\'
HBMAT,'K_lumpm_file1','sti',' ',ASCII,STIFF,YES
FINISH
FINISH
! /EXIT,NOSAV
/BATCH
/COM,ANSYS RELEASE 2025 R2           BUILD 25.2      UP20250519       13:23:50
/BATCH
/COM,ANSYS RELEASE 2025 R2           BUILD 25.2      UP20250519       13:24:35
/input,menust,tmp,''
/GST,ON
/PLO,INFO,3
/GRO,CURL,ON
/CPLANE,1
/inp, '//tsclient/data/liangye/study loves me/data/non-linear problem/Periodic Forced Response Solver/two-solid system/FEM/FromAnsys/block case_files/dp0/APDL/ANSYS/workbench_main.inp'
WPSTYLE,,,,,,,,0
/POST1
/SHOW,WIN32C
INRES,ALL
FILE,'file','rst','.'
SET,LAST
SET,FIRST
/PLOPTS,INFO,3
/CONTOUR,ALL,18
/NUMBER,1
! /UIS,ABORT,1
/SHOW,WIN32
SET,LIST
!
FINISH
/AUX2
FILE,'file','full','..\..\SYS\MECH\'
HBMAT,'K_lumpm','sti',' ',ASCII,STIFF,YES
FINISH
!
FINISH
/AUX2
FILE,'file','full','..\..\SYS\MECH\'
HBMAT,'M_lumpm','sti',' ',ASCII,MASS,YES
FINISH
FINISH
! /EXIT,NOSAV
/BATCH
/COM,ANSYS RELEASE 2025 R2           BUILD 25.2      UP20250519       16:55:13
/input,menust,tmp,''
/GST,ON
/PLO,INFO,3
/GRO,CURL,ON
/CPLANE,1
/inp, '//tsclient/data/liangye/study loves me/data/non-linear problem/Periodic Forced Response Solver/two-solid system/FEM/FromAnsys/block case_files/dp0/APDL/ANSYS/workbench_main.inp'
WPSTYLE,,,,,,,,0
/POST1
SET,LIST
FINISH
! /EXIT,NOSAV
/BATCH
/COM,ANSYS RELEASE 2025 R2           BUILD 25.2      UP20250519       17:26:18
/input,menust,tmp,''
/GST,ON
/PLO,INFO,3
/GRO,CURL,ON
/CPLANE,1
/inp, '//tsclient/data/liangye/study loves me/data/non-linear problem/Periodic Forced Response Solver/two-solid system/FEM/FromAnsys/block case_files/dp0/APDL/ANSYS/workbench_main.inp'
WPSTYLE,,,,,,,,0
/POST1
SET,LIST
FINISH
! /EXIT,NOSAV
/BATCH
/COM,ANSYS RELEASE 2025 R2           BUILD 25.2      UP20250519       17:35:28
/BATCH
/COM,ANSYS RELEASE 2025 R2           BUILD 25.2      UP20250519       17:36:26
/input,menust,tmp,''
/GST,ON
/PLO,INFO,3
/GRO,CURL,ON
/CPLANE,1
/inp, '//tsclient/data/liangye/study loves me/data/non-linear problem/Periodic Forced Response Solver/two-solid system/FEM/FromAnsys/block case_files/dp0/APDL/ANSYS/workbench_main.inp'
WPSTYLE,,,,,,,,0
/POST1
SET,LIST
FINISH
! /EXIT,NOSAV
