*NODE, NSET=NALL
    1, -8.0000000000e-02, 0.0000000000e+00, 0.0000000000e+00
    2, -8.0000000000e-02, 3.0000000000e-02, 0.0000000000e+00
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*ELEMENT, TYPE=C3D4, ELSET=C3D4_1
    338, 87, 75, 121, 115,
    339, 40, 113, 100, 123,
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*ELSET, ELSET=Face_1
    162, 163,
*ELSET, ELSET=Face_2
    164, 165, 166, 167, 168, 170,
*ELSET, ELSET=Boundary_1
    155, 156, 157, 158, 159, 160, 161,
*ELSET, ELSET=Face_4
    277, 278, 279, 280, 281, 282
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*ELSET, ELSET=Face_5
    172, 173, 174, 175, 176, 177
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*ELSET, ELSET=Face_6
    320, 321,
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

*HEADING
Model: test


*MATERIAL,NAME=MAT1
*ELASTIC
210E9,.3
*DENSITY
7.8E3


*SOLID SECTION,ELSET=C3D4_1,MATERIAL=MAT1


*STEP
*FREQUENCY,SOLVER=MATRIXSTORAGE
*END STEP
